# This is an input script that creates a mono disperse polymer brush bilayer
# A coarse grained bead-spring model is used for the polymers which are end
# grafted to the surfaces of 2 opposing FCC walls at random sites.

#--- Initialization ---#

dimension     3
boundary      p p f
units         lj
atom_style    bond


#--- Moved to main.in ---#
#variable      M      equal  50                # The number of polymer chains on each brush
#variable      N      string 80                # The number of beads per chain
#variable      xhi    equal  15                # The width of the polymer Brush
#variable      yhi    equal  20                # The length of the polymer Brush
#variable      wthick equal  3                 # The thickness of the walls wthick=1,2,3,4 gives 2,3,4,6 layers respectively

variable      zhi    equal  $(1.1 * 2 * v_N + (2 * v_wthick))  # The initial height of the simulation box the value is such that no overlaps occur
variable      z0     equal  $((v_zhi)/4 - (v_N)/30)          # This is the location at which to place the CoM of the molecule

print "The number of grafted chains = $(v_M)"
print "The number of beads per chain = $(v_N)"

variable      check  equal count(all)         # The number of atoms in the system
variable      ntwall equal count(twall)       # The number of atoms in the top wall
variable      nbwall equal count(bwall)       # The number of atoms in the bottom wall
variable      s equal 234897  #45335              # Seed for the RNG

print "zhi = ${zhi}"

#--- Create the simulation box ---#

region        sbox block 0 ${xhi} 0 ${yhi} 0 ${zhi}
create_box    4 sbox bond/types 3 extra/bond/per/atom 12 extra/special/per/atom 2

mass          1 2.0                   # Wall atoms that are not grafted
mass          2 1.0                   # Grafted bead
mass          3 1.0                   # The rest of the beads on the chain
mass          4 2.0                   # Wall atoms that the chains are grafted to

bond_style    hybrid fene harmonic    # Finitely extensible linearly elastic bond between neighbouring beads
#bond_coeff    1 fene 30.0 1.5 0.0 0.0      # Values obtained from literature [Grest, Galushcko]
bond_coeff    1 fene 30.0 30.0 0.0 0.0
bond_coeff    2 fene 30.0 30.0 0.0 0.0       # This is the grafting bond between the polymer and the wall atom
special_bonds fene                    #
pair_style	  lj/cut 1.122462         # LJ potential with rc=2^1/6
#pair_coeff	  * * 1.0 1.0             # LJ potential acts between all atoms
pair_coeff    1 1 0.0 0.0
pair_coeff    1 2 1.0 1.0
pair_coeff    1 3 1.0 1.0
pair_coeff    2 2 1.0 1.0
pair_coeff    2 3 1.0 1.0
pair_coeff    2 4 1.0 1.0
pair_coeff    3 3 1.0 1.0
pair_coeff    3 4 1.0 1.0
pair_coeff    4 4 0.0 0.0
neighbor      10 bin                  #
neigh_modify  one 4000

#--- Create and read the molecule file ---#
python        BSMolf input 1 $N format i file BSMolf.py
python        BSMolf invoke    # Call the python function with number of beads to write the mol file
molecule      bs     bsmol.txt     # Read the Mol file to define the polymer chain

#--- Define the FCC wall region ---#
region        wall  block 0 ${xhi} 0 ${yhi} 0 ${wthick}
lattice       fcc 1

#--- Create the Top Brush  (At the bottom then rotate 180 degrees to top) ---#

create_atoms  1 region wall
group         twall  region wall
#group         tsurf  region wsurf

# A loop to insert the Chains into the sim box
variable      i loop $M                                   # Index to insert N total number of chains
label         loop                                        # Start of loop
variable      randni equal round(random(1,${ntwall},$s))  # Pick a random "top" wall atom
#print         "seed is = $s"
#print         "i = $(v_i)"
variable      randatomi equal ${randni}                   # This is to obtain an integer number for atom-id
variable      randzi equal z[${randatomi}]                # Determine the z coordinate of the chosen atom
#print         "z coord of randatom is = ${randzi}"
# if the chosen atom is not a surface atom then restart the loop
if            "${randzi} < $(v_wthick - 0.7)" then "jump MDPBB.in loop"
set           atom ${randatomi} type 4                    # Set this grafted wall atom as a new type
variable      x0 equal x[${randatomi}]                    # Determine its x-coord
variable      y0 equal y[${randatomi}]                    # Determine its y-coord
variable      check0 equal ${check}                       # Count the number of atoms in the simulation
variable      b equal ${check}+1                          # The grafted bead id will be one higher after being inserted
#print         "Grafted Bead ID = $b"
#print         "Random Wall atom = ${randatomi}"
#print         "x = ${x0}"
#print         "y = ${y0}"
variable      flag python A_Check         # Define a flag to check that the atom-id was not previously picked
# If flag = 1 then that means this random atom is already grafted if flag = 0 then atom is free to be grafted
# Define a python function that performs this check and keeps track throughout the loop to ensure no atom is picked twice
python        A_Check input 2 v_randatomi v_M return v_flag format iii file A_Check.py
variable      flag0 equal ${flag}                         # Invoke the python function
#print         "flag = ${flag0}"
# If the atom has been picked previously then do not insert and restart the loop
if            "${flag0} == 1" then "jump MDPBB.in loop"
# Otherwise insert the chain directly above the chosen wall atom pointing perpendicular to the wall
create_atoms  1 single ${x0} ${y0} ${z0} mol bs 24987 units box remap yes rotate 0 0 0 1
variable      check1 equal ${check}               # Count the new total number of atoms
# Check that the molecule has indeed been inserted (This check is no longer an issue).
if            "${check1} != ${check0}" then "create_bonds  single/bond 2 ${randatomi} $b" &
"next i"
jump MDPBB.in loop    # End of the loop

# Rotate the created brush about the centre of the simulation box by 180 degrees to make it true top brush
displace_atoms all rotate $(v_xhi/2.0) $(v_yhi/2.0) $(v_zhi/2.0 - 1) 1 0 0 180 units box

variable      ntop0 equal ${check}          # Count the total number of atoms in the top brush

#--- Create the Bottom brush ---#

# Repeating the same procedure as above again but with new atoms

create_atoms  1 region wall
group         bwall region wall
variable      nbwall0 equal ${nbwall}

variable      j loop $M
label         loopj
variable      randnj equal round(random(v_ntop0,$(v_ntop0 + v_nbwall0),$s))
#print        "seed is = $s"
#print        "j = $(v_j)"
variable      randatomj equal ${randnj}
variable      randzj equal z[${randatomj}]
#print         "z coord of randatom is = ${randzj}"
if            "${randzj} < $(v_wthick - 0.7)" then "jump MDPBB.in loopj"
set           atom ${randatomj} type 4
variable      x0 equal x[${randatomj}]
variable      y0 equal y[${randatomj}]
variable      check0 equal ${check}
variable      b equal ${check}+1
#print        "Grafted Bead ID = $b"
#print        "Random Wall atom = ${randatomj}"
#print        "x = ${x0}"
#print        "y = ${y0}"
variable      flag python A_Check
python        A_Check input 2 v_randatomj v_M return v_flag format iii file A_Check.py
variable      flag0 equal ${flag}
#print        "flag = ${flag0}"
if            "${flag0} == 1" then "jump MDPBB.in loopj"
create_atoms  1 single ${x0} ${y0} ${z0} mol bs 24987 units box remap yes rotate 0 0 0 1

variable      check1 equal ${check}
if            "${check1} != ${check0}" then "create_bonds  single/bond 2 ${randatomj} $b" &
"next j"
jump MDPBB.in loopj

# Assign the beads to 2 different groups of grafted and non-grafted beads

group         gbeads type 2
group         fbeads type 3

#--- Create harmonic bonds in the walls ---#
bond_coeff    3 harmonic 800.0 $(1.5874 * sqrt(2)/2)
create_bonds  many bwall bwall 3 0.5 1.2
create_bonds  many twall twall 3 0.5 1.2

info system


fix           1 twall setforce 0.0 0.0 0.0  # Freeze top wall
fix           2 bwall setforce 0.0 0.0 0.0  # Freeze bottom wall

#dump           1 all image 250 stg0.*.jpg type type zoom 2 view 60 120 bond none none
#dump          2 all atom 50 dump.brush
#dump          3 all custom 100 dump.random.bin id x y z vx vy vz


#--- Minimize the system to obtain the initial structure for the PB bilayer ---#

timestep      0.010
minimize      0.0 1.0e-8 10000 100000

#--- Shrink the simulation box such that it encloses the system exactly ---#

variable z_f equal bound(all,zmin)
variable z_c equal bound(all,zmax)

change_box all z final ${z_f} $(v_z_c + 0.1) units box

info variables                              # For diagnostics

minimize      0.0 1.0e-8 10000 100000

#--- Remove the fixes for the restart file ---#
unfix         1
unfix         2

#--- Write Restart File ---#

write_restart  MDPBB.rst
#write_data     MDPBB.data
